// COMSOL Multiphysics 5.2.1.152 model "comsolhelmholtz.mph"
// Outline of the model tree

Parameters
  lambda = 1
  ax = -pi
  ay = -pi
  bx = pi
  by = pi

Functions
  an1: Analytic | funcname = gb; expr = (bx - x)^2 * cos((pi*x)/bx); args = x
  an2: Analytic | funcname = fb; expr = x*(bx-x)^2; args = x
  an3: Analytic | funcname = xax; expr = gb(ax) + ((y - ax)/(by-ay))*(fb(ax) - gb(ax)); args = y
  an4: Analytic "F(x,y)" | funcname = F; expr = sin(pi * (x-ax) / (bx-ax)) * cos( (pi/2) * (2 * (y-ay) / (by-ay) + 1)); args = {x, y}

Geometry
  geom1 "Geometry 1" (2D, length unit m)
    r1: Rectangle | pos = {ax, ay}; size = {2*pi, 2*pi}
    fin: Finalize "Form Union"

Physics
  hzeq: HelmholtzEquation on all domains
    dependent variable u
    heq1: HelmholtzEquation (default) | c = {-1, 0, 0, -1}; a = lambda; f = F(x,y)
    zflx1: ZeroFluxBoundary "Zero Flux 1" (default)
    init1: init "Initial Values 1" (default)
    dir1: DirichletBoundary "y = by" on boundaries 3 | r = fb(x)
    dir2: DirichletBoundary "y = ay" on boundaries 2 | r = gb(x)
    dir3: DirichletBoundary "x = ax" on boundaries 1 | r = xax(y)
    flux1: FluxBoundary "x = bx" on boundaries 4

Mesh
  mesh1 "Mesh 1" (physics-controlled)
    size: MeshSizeDefault | hauto = 5

Studies
  std1 "Study 1"
    stat: Stationary

Solver configurations
  sol1 "Solution 1" (study std1)
    v1: Variables "Dependent Variables 1"
    s1: Stationary "Stationary Solver 1"
      dDef: Direct
      fc1: FullyCoupled | linsolver = dDef

Datasets
  dset1: Solution | solution = sol1

Plots
  pg1: PlotGroup2D "2D Plot Group 1" | data = dset1
    surf1: Surface | expr = u

Exports
  data1: Data | data = dset1; expr = u; filename = C:\Users\dadalton\Desktop\heqndatanoheader.txt; sort = on
  tbl1: Table